a := 0.2
f(x) := sin(x*3/4) - x^2 - 4
b := 4
# Точки для вычисления погрешности интерполяции
j := 0 .. 150
t[j] := a + (b - a)/150*j
n := [5; 10; 15; 20; 25; 30; 40; 50; 60; 70]  # Равноотстоящие узлы
N := n[0]
i := 0 .. N
x[i] := a + (b - a)*i/N
L(t) := sum(f(x[k])*product(if(k - i, (t - x[i])/(x[k] - x[i]), 1), i = 0 .. N), k = 0 .. N)
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# Вычисление погрешности интерполяции
s[j] := |f(t[j]) - L(t[j])|
r[0] := max(s)
N := n[1]
i := 0 .. N
x[i] := a + (b - a)*i/N
L(t) := sum(f(x[k])*product(if(k - i, (t - x[i])/(x[k] - x[i]), 1), i = 0 .. N), k = 0 .. N)
s[j] := |f(t[j]) - L(t[j])|
r[1] := max(s)
N := n[2]
i := 0 .. N
x[i] := a + (b - a)*i/N
L(t) := sum(f(x[k])*product(if(k - i, (t - x[i])/(x[k] - x[i]), 1), i = 0 .. N), k = 0 .. N)
s[j] := |f(t[j]) - L(t[j])|
r[2] := max(s)
N := n[3]
i := 0 .. N
x[i] := a + (b - a)*i/N
L(t) := sum(f(x[k])*product(if(k - i, (t - x[i])/(x[k] - x[i]), 1), i = 0 .. N), k = 0 .. N)
s[j] := |f(t[j]) - L(t[j])|
r[3] := max(s)
N := n[4]
i := 0 .. N
x[i] := a + (b - a)*i/N
L(t) := sum(f(x[k])*product(if(k - i, (t - x[i])/(x[k] - x[i]), 1), i = 0 .. N), k = 0 .. N)
s[j] := |f(t[j]) - L(t[j])|
r[4] := max(s)
N := n[5]
i := 0 .. N
x[i] := a + (b - a)*i/N
L(t) := sum(f(x[k])*product(if(k - i, (t - x[i])/(x[k] - x[i]), 1), i = 0 .. N), k = 0 .. N)
s[j] := |f(t[j]) - L(t[j])|
r[5] := max(s)
N := n[6]
i := 0 .. N
x[i] := a + (b - a)*i/N
L(t) := sum(f(x[k])*product(if(k - i, (t - x[i])/(x[k] - x[i]), 1), i = 0 .. N), k = 0 .. N)
s[j] := |f(t[j]) - L(t[j])|
r[6] := max(s)
N := n[7]
i := 0 .. N
x[i] := a + (b - a)*i/N
L(t) := sum(f(x[k])*product(if(k - i, (t - x[i])/(x[k] - x[i]), 1), i = 0 .. N), k = 0 .. N)
s[j] := |f(t[j]) - L(t[j])|
r[7] := max(s)
N := n[8]
i := 0 .. N
x[i] := a + (b - a)*i/N
L(t) := sum(f(x[k])*product(if(k - i, (t - x[i])/(x[k] - x[i]), 1), i = 0 .. N), k = 0 .. N)
s[j] := |f(t[j]) - L(t[j])|
r[8] := max(s)
N := n[9]
i := 0 .. N
x[i] := a + (b - a)*i/N
L(t) := sum(f(x[k])*product(if(k - i, (t - x[i])/(x[k] - x[i]), 1), i = 0 .. N), k = 0 .. N)
s[j] := |f(t[j]) - L(t[j])|
r[9] := max(s)
r = [0.000744813; 1.18131e-9; 0; 0; 3.23728e-10; 8.8378e-9; 5.18136e-6; 0.00423994; 1.32492; 1601.66]
# 2. Чебышевские узлы
N := n[0]
i := 0 .. N
v[i] := cos(π*(1 + 2*i)/(2*(N + 1)))
z[i] := (a + b)/2 + (b - a)/2*v[i]
LCH(t) := sum(f(z[k])*product(if(k - i, (t - z[i])/(z[k] - z[i]), 1), i = 0 .. N), k = 0 .. N)
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s[j] := |f(t[j]) - LCH(t[j])|
rch[0] := max(s)
N := n[1]
i := 0 .. N
v[i] := cos(π*(1 + 2*i)/(2*(N + 1)))
z[i] := (a + b)/2 + (b - a)/2*v[i]
LCH(t) := sum(f(z[k])*product(if(k - i, (t - z[i])/(z[k] - z[i]), 1), i = 0 .. N), k = 0 .. N)
s[j] := |f(t[j]) - LCH(t[j])|
rch[1] := max(s)
N := n[2]
i := 0 .. N
v[i] := cos(π*(1 + 2*i)/(2*(N + 1)))
z[i] := (a + b)/2 + (b - a)/2*v[i]
LCH(t) := sum(f(z[k])*product(if(k - i, (t - z[i])/(z[k] - z[i]), 1), i = 0 .. N), k = 0 .. N)
s[j] := |f(t[j]) - LCH(t[j])|
rch[2] := max(s)
N := n[3]
i := 0 .. N
v[i] := cos(π*(1 + 2*i)/(2*(N + 1)))
z[i] := (a + b)/2 + (b - a)/2*v[i]
LCH(t) := sum(f(z[k])*product(if(k - i, (t - z[i])/(z[k] - z[i]), 1), i = 0 .. N), k = 0 .. N)
s[j] := |f(t[j]) - LCH(t[j])|
rch[3] := max(s)
N := n[4]
i := 0 .. N
v[i] := cos(π*(1 + 2*i)/(2*(N + 1)))
z[i] := (a + b)/2 + (b - a)/2*v[i]
LCH(t) := sum(f(z[k])*product(if(k - i, (t - z[i])/(z[k] - z[i]), 1), i = 0 .. N), k = 0 .. N)
s[j] := |f(t[j]) - LCH(t[j])|
rch[4] := max(s)
N := n[5]
i := 0 .. N
v[i] := cos(π*(1 + 2*i)/(2*(N + 1)))
z[i] := (a + b)/2 + (b - a)/2*v[i]
LCH(t) := sum(f(z[k])*product(if(k - i, (t - z[i])/(z[k] - z[i]), 1), i = 0 .. N), k = 0 .. N)
s[j] := |f(t[j]) - LCH(t[j])|
rch[5] := max(s)
N := n[6]
i := 0 .. N
v[i] := cos(π*(1 + 2*i)/(2*(N + 1)))
z[i] := (a + b)/2 + (b - a)/2*v[i]
LCH(t) := sum(f(z[k])*product(if(k - i, (t - z[i])/(z[k] - z[i]), 1), i = 0 .. N), k = 0 .. N)
s[j] := |f(t[j]) - LCH(t[j])|
rch[6] := max(s)
N := n[7]
i := 0 .. N
v[i] := cos(π*(1 + 2*i)/(2*(N + 1)))
z[i] := (a + b)/2 + (b - a)/2*v[i]
LCH(t) := sum(f(z[k])*product(if(k - i, (t - z[i])/(z[k] - z[i]), 1), i = 0 .. N), k = 0 .. N)
s[j] := |f(t[j]) - LCH(t[j])|
rch[7] := max(s)
N := n[8]
i := 0 .. N
v[i] := cos(π*(1 + 2*i)/(2*(N + 1)))
z[i] := (a + b)/2 + (b - a)/2*v[i]
LCH(t) := sum(f(z[k])*product(if(k - i, (t - z[i])/(z[k] - z[i]), 1), i = 0 .. N), k = 0 .. N)
s[j] := |f(t[j]) - LCH(t[j])|
rch[8] := max(s)
N := n[9]
i := 0 .. N
v[i] := cos(π*(1 + 2*i)/(2*(N + 1)))
z[i] := (a + b)/2 + (b - a)/2*v[i]
LCH(t) := sum(f(z[k])*product(if(k - i, (t - z[i])/(z[k] - z[i]), 1), i = 0 .. N), k = 0 .. N)
s[j] := |f(t[j]) - LCH(t[j])|
rch[9] := max(s)
rch = [0.000344142; 1.41885e-10; 1.77636e-14; 3.19744e-14; 2.13163e-14; 3.90799e-14; 2.4869e-14; 3.19744e-14; 2.13163e-14; 3.90799e-14]
# Графики погрешности интерполяции
m := 0 .. 9
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# Интерполяционные сплайны
# Линейный интерполяционный сплайн
N := n[0]
i := 0 .. N
xx[i] := a + (b - a)*i/N
y[i] := f(xx[i])
LS(t) := linterp(xx, y, t)
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s[j] := |f(t[j]) - LS(t[j])|
rls[0] := max(s)
N := n[1]
i := 0 .. N
xx[i] := a + (b - a)*i/N
y[i] := f(xx[i])
LS(t) := linterp(xx, y, t)
s[j] := |f(t[j]) - LS(t[j])|
rls[1] := max(s)
N := n[2]
i := 0 .. N
xx[i] := a + (b - a)*i/N
y[i] := f(xx[i])
LS(t) := linterp(xx, y, t)
s[j] := |f(t[j]) - LS(t[j])|
rls[2] := max(s)
N := n[3]
i := 0 .. N
xx[i] := a + (b - a)*i/N
y[i] := f(xx[i])
LS(t) := linterp(xx, y, t)
s[j] := |f(t[j]) - LS(t[j])|
rls[3] := max(s)
N := n[4]
i := 0 .. N
xx[i] := a + (b - a)*i/N
y[i] := f(xx[i])
LS(t) := linterp(xx, y, t)
s[j] := |f(t[j]) - LS(t[j])|
rls[4] := max(s)
N := n[5]
i := 0 .. N
xx[i] := a + (b - a)*i/N
y[i] := f(xx[i])
LS(t) := linterp(xx, y, t)
s[j] := |f(t[j]) - LS(t[j])|
rls[5] := max(s)
N := n[6]
i := 0 .. N
xx[i] := a + (b - a)*i/N
y[i] := f(xx[i])
LS(t) := linterp(xx, y, t)
s[j] := |f(t[j]) - LS(t[j])|
rls[6] := max(s)
N := n[7]
i := 0 .. N
xx[i] := a + (b - a)*i/N
y[i] := f(xx[i])
LS(t) := linterp(xx, y, t)
s[j] := |f(t[j]) - LS(t[j])|
rls[7] := max(s)
N := n[8]
i := 0 .. N
xx[i] := a + (b - a)*i/N
y[i] := f(xx[i])
LS(t) := linterp(xx, y, t)
s[j] := |f(t[j]) - LS(t[j])|
rls[8] := max(s)
N := n[9]
i := 0 .. N
xx[i] := a + (b - a)*i/N
y[i] := f(xx[i])
LS(t) := linterp(xx, y, t)
s[j] := |f(t[j]) - LS(t[j])|
rls[9] := max(s)
rls = [0.184738; 0.0459385; 0.0205535; 0.0115049; 0.00740005; 0.00493259; 0.00287758; 0.00164445; 0.00123336; 0.000939713]
