1.
f(x) := 2*sin(2*x) - x^2
a := 0
b := 3
I := integral(f(x), x = a .. b) = -8.96017
# 2.
α := 1/2
k := 1 .. 10
n[k] := 2^k  # вектор количества узлов
h[k] := (b - a)/n[k]  # вектор шагов
J[k] := sum(h[k]*f(a + i*h[k] + α*h[k]), i = 0 .. n[k] - 1)
# 3.
|J[k] - I| = [0.582565; 0.14462; 0.0361053; 0.0090234; 0.00225567; 0.000563906; 0.000140976; 3.52439e-5; 8.81098e-6; 2.20274e-6]
# 4.
n := 2 .. 10
m := 3 .. 10
R[n] := |J[n] - J[n - 1]|/3
R[m] = [0.0361714; 0.0090273; 0.00225591; 0.000563921; 0.000140977; 3.5244e-5; 8.81098e-6; 2.20274e-6]
|J[m] - I| = [0.0361053; 0.0090234; 0.00225567; 0.000563906; 0.000140976; 3.52439e-5; 8.81098e-6; 2.20274e-6]
# 5.
R[m - 1]/R[m] = [4.03583; 4.00689; 4.00162; 4.0004; 4.0001; 4.00002; 4.00001; 4]
# 6.
m := 5
j := 1 .. m
x[1] := 0.11270167
c[1] := 0.11846344
c[4] := 0.23931433
x[2] := 0.23076534
c[2] := 0.23931433
c[5] := 0.11846344
x[3] := 0.5
c[3] := 0.28444444
x[4] := 0.76923466
x[5] := 0.95308992
z[j] := a + (b - a)*x[j]
G := (b - a)*sum(c[j]*f(z[j]), j = 1 .. m) = -8.74633
# 7.
|I - G| = 0.213839
# 8.
L := |G - I| = 0.213839
k = [1; 2; 3; 4; 5; 6; 7; 8; 9; 10]
|I - J[k]| = [0.582565; 0.14462; 0.0361053; 0.0090234; 0.00225567; 0.000563906; 0.000140976; 3.52439e-5; 8.81098e-6; 2.20274e-6]
L = 0.213839
# приближено для k=2
# Количество узлов
k := 2
n := 2^k = 4
